*Heading
** Job name: HollowCylinder Model name: Model-1
** Generated by: Abaqus/CAE 6.14-1
*Preprint, echo=NO, model=NO, history=NO, contact=NO
** ----------------------------------------------------------------
**
** PART INSTANCE: HollowCylinder-1
**
*Node
      1,  0.159999996, 0.0399999991
      2,  0.158000007, 0.0399999991
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*Element, type=CAX4
  1,   1,   2,  23,  22
  2,   2,   3,  24,  23
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*Nset, nset=HollowCylinder-1_Set-1, generate
   1,  861,    1
*Elset, elset=HollowCylinder-1_Set-1, generate
   1,  800,    1
*Nset, nset=HollowCylinder-1_Symmetry, generate
 421,  441,    1
** Section: Section-1
*Solid Section, elset=HollowCylinder-1_Set-1, material=Arruda
,
*System
*Nset, nset=Set-1, generate
  21,  861,   21
*Elset, elset=Set-1, generate
  20,  800,   20
*Nset, nset=Set-2
   1,   2,   3,   4,   5,   6
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*Elset, elset=Set-2
   1,   2,   3,   4,   5,   6
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*Nset, nset=Set-3, generate
  21,  861,   21
*Elset, elset=Set-3, generate
  20,  800,   20
*Elset, elset=_Innewr_S2, generate
  20,  800,   20
*Surface, type=ELEMENT, name=Innewr
_Innewr_S2, S2
**
** MATERIALS
**
*Material, name=Arruda
*User Material, constants=3
*** 1.0e+06, 1e+09, 3e+06, 0., 0., 0.0025, 0.0085
1.039e+06, 2.8, 1.0e+09
**
** BOUNDARY CONDITIONS
**
** Name: BC-1 Type: Displacement/Rotation
*Boundary
HollowCylinder-1_Symmetry, 2, 2
** Name: BC-3 Type: Displacement/Rotation
*Boundary
Set-2, 2, 2
** ----------------------------------------------------------------
**
** STEP: Loading-I
**
*Step, name=Loading-I, nlgeom=YES, inc=100000
*Static
1., 1000., 0.01, 10.
**
** BOUNDARY CONDITIONS
**
** Name: DispI Type: Displacement/Rotation
*Boundary
Set-1, 1, 1, 0.05
**
** OUTPUT REQUESTS
**
*Restart, write, frequency=0
**
** FIELD OUTPUT: F-Output-1
**
*Output, field, variable=PRESELECT
**
** HISTORY OUTPUT: H-Output-1
**
*Output, history, variable=PRESELECT
*End Step
*** ** ----------------------------------------------------------------
*** **
*** ** STEP: Xlink-I
*** **
*** *Step, name=Xlink-I, nlgeom=YES, inc=10000
*** *Static
*** 1., 1000., 0.001, 10.
*** **
*** ** OUTPUT REQUESTS
*** **
*** *Restart, write, frequency=0
*** **
*** ** FIELD OUTPUT: F-Output-1
*** **
*** *Output, field, variable=PRESELECT
*** **
*** ** HISTORY OUTPUT: H-Output-1
*** **
*** *Output, history, variable=PRESELECT
*** *End Step
*** ** ----------------------------------------------------------------
*** **
*** ** STEP: Loading-II
*** **
*** *Step, name=Loading-II, nlgeom=YES, inc=10000
*** *Static
*** 1., 1000., 0.01, 20.
*** **
*** ** BOUNDARY CONDITIONS
*** **
*** ** Name: DispI Type: Displacement/Rotation
*** *Boundary
*** Set-1, 1, 1, 0.04
*** **
*** ** OUTPUT REQUESTS
*** **
*** *Restart, write, frequency=0
*** **
*** ** FIELD OUTPUT: F-Output-1
*** **
*** *Output, field, variable=PRESELECT
*** **
*** ** HISTORY OUTPUT: H-Output-1
*** **
*** *Output, history, variable=PRESELECT
*** *End Step
*** ** ----------------------------------------------------------------
*** **
*** ** STEP: Xlink-II
*** **
*** *Step, name=Xlink-II, nlgeom=YES, inc=10000
*** *Static
*** 1., 1000., 0.001, 10.
*** **
*** ** OUTPUT REQUESTS
*** **
*** *Restart, write, frequency=0
*** **
*** ** FIELD OUTPUT: F-Output-1
*** **
*** *Output, field, variable=PRESELECT
*** **
*** ** HISTORY OUTPUT: H-Output-1
*** **
*** *Output, history, variable=PRESELECT
*** *End Step
*** ** ----------------------------------------------------------------
*** **
*** ** STEP: Unloading
*** **
*** *Step, name=Unloading, nlgeom=YES
*** *Static
*** 10., 1000., 0.01, 50.
*** **
*** ** BOUNDARY CONDITIONS
*** **
*** ** Name: BC-1 Type: Displacement/Rotation
*** *Boundary, op=NEW
*** HollowCylinder-1_Symmetry, 2, 2
*** ** Name: BC-3 Type: Displacement/Rotation
*** *Boundary, op=NEW
*** Set-2, 2, 2
*** ** Name: DispI Type: Displacement/Rotation
*** *Boundary, op=NEW
*** **
*** ** OUTPUT REQUESTS
*** **
*** *Restart, write, frequency=0
*** **
*** ** FIELD OUTPUT: F-Output-1
*** **
*** *Output, field, variable=PRESELECT
*** **
*** ** HISTORY OUTPUT: H-Output-1
*** **
*** *Output, history, variable=PRESELECT
*** *End Step
*** ** ----------------------------------------------------------------
*** **
*** ** STEP: CleaveI
*** **
*** *Step, name=CleaveI, nlgeom=YES, inc=10000
*** *Static
*** 1., 1000., 0.01, 20.
*** **
*** ** OUTPUT REQUESTS
*** **
*** *Restart, write, frequency=0
*** **
*** ** FIELD OUTPUT: F-Output-1
*** **
*** *Output, field, variable=PRESELECT
*** **
*** ** HISTORY OUTPUT: H-Output-1
*** **
*** *Output, history, variable=PRESELECT
*** *End Step
*** ** ----------------------------------------------------------------
*** **
*** ** STEP: CleaveII
*** **
*** *Step, name=CleaveII, nlgeom=YES, inc=10000
*** *Static
*** 1., 1000., 0.01, 10.
*** **
*** ** OUTPUT REQUESTS
*** **
*** *Restart, write, frequency=0
*** **
*** ** FIELD OUTPUT: F-Output-1
*** **
*** *Output, field, variable=PRESELECT
*** **
*** ** HISTORY OUTPUT: H-Output-1
*** **
*** *Output, history, variable=PRESELECT
*** *End Step
